#FENE beadspring model with varying kappa in angle potential
# The following variables are expected to be set via `-var`:
# variable experiment_path equal /experiment/...
# variable kappa index 10 20 20 ...

# processors 2 2 2

units                    lj
atom_style               angle
special_bonds            fene
boundary                 p p p

read_data                ${experiment_path}/data/initial_system.data


bond_style               fene
bond_coeff               1 30.0 1.5 1.0 1.0


variable i loop ${n_kappas}
label DO_SIMULATION

log ${experiment_path}/logs/log.${i}.txt

angle_style cosine
angle_coeff 1 ${kappa}

group anchor type 1
group end    type 3

group  free subtract all anchor   # all monomers except anchors are free


# Only free atoms are moved:
fix                      1 free nve
fix                      2 free langevin 1.0 1.0 1.0 904297


# For all fixed atoms, the force is set to zero:
fix                      4 anchor setforce 0.0 0.0 0.0


thermo                    1000
timestep                 0.0025
neighbor       0.3 bin
neigh_modify   delay 1 every 1 check yes

restart                  1000000  ${experiment_path}/checkpoints/fene.restart.${i}


# First let the polymers relax

dump dump_vmd_${i} all atom 10000 ${experiment_path}/data/polymer_relax-${i}.vmd
dump dump_${i} all custom 100000 ${experiment_path}/data/polymer_relax-${i}.out id type x y z ix iy iz
dump_modify dump_vmd_${i} sort id
dump_modify dump_${i} sort id

run 3000000


# Now collect data

undump dump_vmd_${i}
undump dump_${i}

dump dump_vmd_${i} all atom 100000 ${experiment_path}/data/polymer-${i}.vmd
dump dump_${i} all custom 10000 ${experiment_path}/data/polymer-${i}.out id type x y z ix iy iz
dump_modify dump_vmd_${i} sort id
dump_modify dump_${i} sort id

run 5000000

next kappa
next i

jump SELF DO_SIMULATION
